# Единицы времени:
с := s
ч := hr
пс := ps
нс := ns
мкс := μs
мс := ms
мин := min
сут := day
нед := 7*day
мес := 30 сут
# Единицы температуры:
К := K
# Единицы массы:
кг := kg
т := tonne
мкг := gm*10^-6
мг := mg
г := gm
а.е.м := 1.66053906892*10^-27 kg  # Примечание: Опущен период в конце (52)
# Единицы длины:
нм := nm
мкм := μm
мм := mm
см := cm
м := m
км := km
ангстрем := Angstrom
# Единицы площади:
акр := acre
а := m^2*10^2
са := m^2*10^0
га := m^2*10^4
б := m^2*10^-28
# Единицы объёма:
нл := L*10^-9
мкл := L*10^-6
мл := mL
л := L
гал := gal
# Единицы силы:
нН := N*10^-9
мкН := N*10^-6
мН := N*10^-3
Н := N
кН := kN
МН := MN
дин := N*10^-5
кгс := 1 kg*g = 9.80665 N
# Единицы давления:
мПа := Pa*10^-3
Па := Pa
гПа := Pa*10^2
кПа := kPa
МПа := MPa
ГПа := Pa*10^9
атм := atm
мм.вод.ст := PropsSI("D", "P", 1 atm, "T", 4 °C, "IF97::Water")*g*1 mm
а.т := кгс/см^2
мм.рт.ст := torr
# Единицы мощности:
пВт := pW
нВт := nW
мкВт := μW
мВт := mW
сВт := W*10^-2
Вт := W
кВт := kW
МВт := MW
# Единицы заряда:
пКл := pC
нКл := nC
мкКл := μC
мКл := mC
Кл := C
# Единицы тока:
пА := pA
нА := nA
мкА := μA
мА := mA
А := A
кА := kA
МА := A*10^6
# Единицы напряжения:
пВ := pV
нВ := nV
мкВ := μV
мВ := mV
В := V
кВ := kV
МВ := V*10^6
# Единицы сопротивления:
мкОм := Ω*10^-6
мОм := Ω*10^-3
Ом := Ω
кОм := kΩ
МОм := MΩ
ГОм := Ω*10^9
# Единицы проводимости:
пСм := S*10^-12
нСм := S*10^-9
мкСм := S*10^-6
мСм := S*10^-3
дСм := S*10^-1
См := S
# Единицы емкости:
пФ := pF
нФ := nF
мкФ := μF
мФ := F*10^-3
Ф := F
кФ := F*10^3
# Единицы индуктивности:
нГн := H*10^-9
мкГн := μH
мГн := mH
Гн := H
# Единицы магнитной индуктивности:
мкТл := T*10^-6
мТл := T*10^-3
Тл := T
мГс := G*10^-3
Гс := G
# Единицы магнитного потока:
мкВб := Wb*10^-6
мВб := Wb*10^-3
Вб := Wb
Мкс := Wb*10^-8
# Единицы напряженности магнитного поля:
Э := 1000/(4*π)*A/m
# Единицы углов:
рад := rad
об := rev
ср := sr
# Единицы частоты:
пГц := Hz*10^-12
нГц := Hz*10^-9
мкГц := Hz*10^-6
мГц := Hz*10^-3
Гц := Hz
кГц := kHz
МГц := MHz
ГГц := GHz
ТГц := Hz*10^12
# Единицы активности:
мБк := Bq*10^-3
Бк := Bq
кБк := Bq*10^3
МБк := Bq*10^6
ГБк := Bq*10^9
ТБк := Bq*10^12
Ки := 3.7*10^10 Bq
пКи := Ки*10^-12
нКи := Ки*10^-9
мкКи := Ки*10^-6
мКи := Ки*10^-3
мкРд := Bq
мРд := Bq*10^3
Рд := Bq*10^6
кРд := Bq*10^9
# Единицы энергии:
пДж := J*10^-12
нДж := J*10^-9
мкДж := J*10^-6
мДж := J*10^-3
Дж := J
кДж := J*10^3
МДж := J*10^6
ГДж := J*10^9
ТДж := J*10^12
кал := cal
ккал := kcal
Мкал := kcal*10^3
Гкал := kcal*10^6
эрг := erg
эВ := 1.602176634*10^-19 C
кэВ := эВ*10^3
МэВ := эВ*10^6
ГэВ := эВ*10^9
ТэВ := эВ*10^12
# Единицы дозы:
Зв := S
мЗв := Sv*10^-3
мкЗв := Sv*10^-6
Р := 0.01 Sv
мР := Р*10^-3
мкР := Р*10^-6
# Единицы динамической вязкости:
нПз := poise*10^-9
мкПз := poise*10^-6
мПз := poise*10^-3
Пз := poise
# Единицы кинематической вязкости:
мСт := stokes*10^-3
сСт := stokes*10^-2
Ст := stokes
даСт := stokes*10^1
гСт := stokes*10^2
# Единицы количества вещества:
пмоль := mol*10^-12
нмоль := mol*10^-9
мкмоль := mol*10^-6
ммоль := mol*10^-3
моль := mol
# Единицы каталитической активности:
пкат := katal*10^-12
нкат := katal*10^-9
мккат := katal*10^-6
мкат := katal*10^-3
кат := katal
# Единицы освещенности:
мклк := lx*10^-6
млк := lx*10^-3
лк := lx
клк := lx*10^3
Млк := lx*10^6
Глк := lx*10^9
мкФот := lx*10^-2
мФот := lx*10^1
Фот := lx*10^4
кФот := lx*10^7
# Единицы силы света:
мккд := cd*10^-6
мкд := cd*10^-3
кд := cd
ккд := cd*10^3
Мкд := cd*10^6
# Единицы светового потока:
млм := lm*10^-3
лм := lm
клм := lm*10^3
Млм := lm*10^6
# Единицы валюты:
руб := ¤
# Ввод символов с указанным справа кодом осуществляется при зажатой клавише alt, на numpad вводятся цифры и знак +, а буквы с клавиатуры, все они вводятся последовательно однократным нажатием без их дальнейшего удержания.
# Для использования ввода символа процента через сочетание клавиш необходимо:
# 1)Нажмите Win + R, введите regedit.
# 2)Перейдите по пути: HKEY_CURRENT_USER\Control Panel\Input Method
# 3)Создайте (или измените если уже есть) строковый параметр (String Value) с именем EnableHexNumpad.
# 4)Установите значение 1.
# 5)Перезагрузите компьютер.
# Единицы доли:
％ := 10^-2
# код: alt + FF05
‰ := 10^-3  # код: alt 0137
тыс := 10^3
млн := 10^6
# Специальные единицы измерения (их применение обусловлено физическим смыслом размерностей):
м.возд := m
м.газ := m
м.RO_2 := m
м.N_2 := m
м.H_2O := m
м.д.г := m
н.м := m
г.H_2O := gm
кг.возд := kg
